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/batch
! ANSYS input file written by Workbench version 15.0  Release
! File used for geometry attach: D:\ECLoud\Shared\EPSA\Maquette Catia\freinage\disque.CATPart
/title,unsaved_project--Steady-State Thermal (A5)
/com,--- Data in consistent MKS units.
/units,MKS
/prep7
! Turn off shape checking because checks already performed inside WB mesher.
! See help system for more information.
SHPP,OFF,,NOWARN
etcon,set             ! allow ANSYS to choose best KEYOP's for 180x elements
/com,*********** Nodes for the whole assembly ***********
nblock,3
(1i9,3e20.9e3)
        1    9.989830281E-003    8.909198167E-002    4.000000000E-003
        2    8.858797815E-002   -1.044285882E-002    4.000000000E-003
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-1
/com,*********** Elements for Body 1 "PartBody" ***********
et,1,90
eblock,19,solid,,1846
(19i9)
        1        1        1        1        0        0        0        0       20        0        1      520      948      993      599     2037     1609     1564     1958
     7051     8364     7345     7050    10207    10053    10055    11264     7052     8365     8506     7346
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-1
/com,*********** Send User Defined Coordinate System(s) ***********
csys,0
toffst,273.15,  ! Temperature offset from absolute zero
/com,*********** Send Materials ***********
MP,DENS,1,7850,	! kg m^-3
MP,ALPX,1,1.2e-05,	! C^-1
MP,C,1,434,	! J kg^-1 C^-1
MP,KXX,1,60.5,	! W m^-1 C^-1
MP,RSVX,1,1.7e-07,	! kg m^3 A^-2 s^-3
MP,EX,1,200000000000,	! Pa
MP,NUXY,1,0.3,
MP,MURX,1,10000,

!************************* Model Summary ********************
!PartBody,	Structural Steel,	matid,	1
!************************* End Model Summary ********************
/com,*********** Define Temperature Constraint ***********
CMBLOCK,_CM32   ,NODE,    14172
(8i10)
         1         2         3         4         5         6         7         8
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
*DIM,_loadvari32,TABLE,2,1,1,TIME,
! Time values
_loadvari32(1,0,1) = 0.
_loadvari32(2,0,1) = 1.
! Load values
_loadvari32(1,1,1) = 25.
_loadvari32(2,1,1) = 20.

/com,*********** Create "Heat Flow" ***********
et,2,152
eblock,10,,,1846
(15i9)
     1847        2        2        2        0     2314     1361     1884     1884     9395     9394     1884    11050
     1848        2        2        2        0     2314     1534     1361     1361     9959     9392     1361     9395
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-1
eblock,10,,,1846
(15i9)
     3693        2        2        2        0      243      673     1196     1196     5844     7564     1196     5847
     3694        2        2        2        0      243     1196     1023     1023     5847     8570     1023     5846
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-1
esel,s,type,,2
keyop,2,8,1      ! include heat flux

*DIM,_loadvari28,TABLE,2,1,1,TIME,
! Time values
_loadvari28(1,0,1) = 0.
_loadvari28(2,0,1) = 1.
! Load values
_loadvari28(1,1,1) = 387258.331613794
_loadvari28(2,1,1) = 387258.331613794

esel,all
fcum,add                   ! add nodal forces up (needed in case have loads on the same edge,vertex)
nsel,all
fcum                       ! reset default on fcum command since done sending WB F loads
/com,***************** Define Uniform Initial temperature ***************
tunif,25.
fini
/com,****************************************************************************
/com,*************************    SOLUTION       ********************************
/com,****************************************************************************
/solu
antype,0                   ! static analysis
solc,on,on                 ! Turn on solution control with ability to use contact time prediction
!eqsl,sparse               ! using sparse solver which is default so no eqsl command needed
cntr,print,1               ! print out contact info and also make no initial contact an error
resc,,none                 ! Do not keep any restart files
rstsuppress,cont           ! Don't write contact results
/com,****************************************************
/com,******************* SOLVE FOR LS 1 ****************
d,_CM32,temp,%_loadvari32%
esel,s,type,,2
nsle
sf,all,hflux,%_loadvari28%
nsel,all
esel,all
autots,on
nsub,1,10,1
time,1.
outres,erase
outres,all,none
outres,nsol,all
outres,rsol,all
outres,fflux,all
cnvtol,heat,,.001,,1.e-006	! Program Controlled. Set MINREF equivalent of 1e-6 Watts
! *********** WB SOLVE COMMAND ***********
! check interactive state
*get,ANSINTER_,active,,int
*if,ANSINTER_,ne,0,then
/eof
*endif
solve
/com *************** Write FE CONNECTORS *********
CEWRITE,file,ce,,INTE
/com,****************************************************
/com,*************** FINISHED SOLVE FOR LS 1 *************
*set,_DS_PROGRESS          ! turn off progress updates to avoid virus scanning bug
/post1
fini
